# OpenSim document version 30000
InverseKinematicsTool walk:
  results_directory: ./results_walk
  model_file: ../Scale/subject_scaled_walk.osim
  constraint_weight: Inf
  accuracy: 1e-5
  marker_file: ../ExpData/motion_capture_walk.trc
  time_range: 0 999
  report_errors: true
  report_marker_locations: false
  IKTaskSet:
    # Torso / head (constrain lumbar; avoids hip-hunch from missing upper-body tasks).
    IKMarkerTask Head: apply=true weight=20
    IKMarkerTask MidClavicle: apply=true weight=15
    IKMarkerTask R.Shoulder: apply=true weight=10
    IKMarkerTask L.Shoulder: apply=true weight=10
    # PiG LCLA/RCLA do not match Rajagopal Clavicle landmarks — leave off.
    IKMarkerTask R.Clavicle: apply=false weight=0
    IKMarkerTask L.Clavicle: apply=false weight=0
    IKMarkerTask R.Biceps: apply=false weight=0
    IKMarkerTask L.Biceps: apply=false weight=0
    IKMarkerTask R.Elbow: apply=true weight=2
    IKMarkerTask L.Elbow: apply=true weight=2
    IKMarkerTask R.MElbow: apply=false weight=0
    IKMarkerTask L.MElbow: apply=false weight=0
    IKMarkerTask R.Forearm: apply=false weight=0
    IKMarkerTask L.Forearm: apply=false weight=0
    IKMarkerTask R.Wrist: apply=true weight=1
    IKMarkerTask L.Wrist: apply=true weight=1
    # Pelvis
    IKMarkerTask R.ASIS: apply=true weight=50
    IKMarkerTask L.ASIS: apply=true weight=50
    IKMarkerTask S2: apply=true weight=40
    IKMarkerTask R.PSIS: apply=true weight=40
    IKMarkerTask L.PSIS: apply=true weight=40
    IKMarkerTask R_HJC: apply=false weight=0
    IKMarkerTask L_HJC: apply=false weight=0
    IKMarkerTask R.Knee: apply=true weight=35
    IKMarkerTask L.Knee: apply=true weight=35
    IKMarkerTask R.MKnee: apply=false weight=0
    IKMarkerTask L.MKnee: apply=false weight=0
    IKMarkerTask R.Ankle: apply=true weight=30
    IKMarkerTask L.Ankle: apply=true weight=30
    IKMarkerTask R.MAnkle: apply=false weight=0
    IKMarkerTask L.MAnkle: apply=false weight=0
    IKMarkerTask R.Toe: apply=true weight=80
    IKMarkerTask L.Toe: apply=true weight=80
    IKMarkerTask R.MT5: apply=false weight=0
    IKMarkerTask L.MT5: apply=false weight=0
    IKMarkerTask R.Heel: apply=true weight=80
    IKMarkerTask L.Heel: apply=true weight=80
    # Cluster tracking: only TH1/SH1 exist in PiG.
    IKMarkerTask R.TH1: apply=true weight=2
    IKMarkerTask R.TH2: apply=false weight=0
    IKMarkerTask R.TH3: apply=false weight=0
    IKMarkerTask R.SH1: apply=true weight=2
    IKMarkerTask R.SH2: apply=false weight=0
    IKMarkerTask R.SH3: apply=false weight=0
    IKMarkerTask R.SH4: apply=false weight=0
    IKMarkerTask L.TH1: apply=true weight=2
    IKMarkerTask L.TH2: apply=false weight=0
    IKMarkerTask L.TH3: apply=false weight=0
    IKMarkerTask L.TH4: apply=false weight=0
    IKMarkerTask L.SH1: apply=true weight=2
    IKMarkerTask L.SH2: apply=false weight=0
    IKMarkerTask L.SH3: apply=false weight=0
