# OpenSim document version 40600
MarkerSet:
  Marker Head: torso (0 0.67 0) fixed=true
  Marker R.Shoulder: torso (0 0.418 0.142) fixed=true
  Marker L.Shoulder: torso (0 0.418 -0.142) fixed=true
  Marker R.Clavicle: torso (0.046 0.385 0.025) fixed=true
  Marker L.Clavicle: torso (0.046 0.385 -0.025) fixed=true
  Marker R.Elbow: humerus_r (0.01 -0.281 0.035) fixed=true
  Marker R.Wrist: radius_r (-0.03 -0.24 0.006) fixed=true
  Marker L.Elbow: humerus_l (0.01 -0.281 -0.035) fixed=true
  Marker L.Wrist: radius_l (-0.03 -0.24 -0.006) fixed=true
  Marker R.ASIS: pelvis (0.013 0.03 0.128) fixed=true
  Marker L.ASIS: pelvis (0.013 0.03 -0.128) fixed=true
  Marker R.PSIS: pelvis (-0.1223111 -0.003153441 0.05066066)
  Marker L.PSIS: pelvis (-0.1198002 -0.0022061 -0.04067574)
  Marker R.TH1: femur_r (0.04559536 -0.3136409 0.07478338)
  Marker R.Knee: femur_r (0 -0.404 0.047) fixed=true
  Marker R.SH1: tibia_r (-0.01333137 -0.1584345 0.114543)
  Marker R.Ankle: tibia_r (-0.02062283 -0.381724 0.03930703)
  Marker R.Toe: calcn_r (0.1560219 0.08653486 -0.01146456)
  Marker R.Heel: calcn_r (-0.01544277 0.0279179 -0.006329791)
  Marker L.TH1: femur_l (0.03410038 -0.3364466 -0.07693612)
  Marker L.Knee: femur_l (0 -0.404 -0.047) fixed=true
  Marker L.SH1: tibia_l (-0.006709097 -0.1232214 -0.09090925)
  Marker L.Ankle: tibia_l (-0.02090187 -0.3825576 -0.03708962)
  Marker L.Toe: calcn_l (0.162071 0.08067845 0.01406773)
  Marker L.Heel: calcn_l (-0.01483096 0.02695657 0.005945771)
  Marker MidClavicle: torso (0.046 0.385 0) fixed=true
